# OpenSim document version 40000
AnalyzeTool test:
  model_file: gait2392_PiGpelvisFrame3DoFkneeNoTorso.osim
  replace_force_set: false
  results_directory: C:\Users\Hans\Documents\GitHub\MuscleLength\MuscleAnalysis\
  output_precision: 8
  initial_time: 0.008333333
  final_time: 5.258333
  solve_for_equilibrium_for_auxiliary_states: false
  maximum_number_of_integrator_steps: 20000
  maximum_integrator_step_size: 1
  minimum_integrator_step_size: 1e-8
  integrator_error_tolerance: 1e-5
  coordinates_file: test.mot
  lowpass_cutoff_frequency_for_coordinates: -1
  AnalysisSet Analyses:
    MuscleAnalysis: start_time=0 end_time=10 step_interval=1 in_degrees=true muscle_list=all
        moment_arm_coordinate_list=all compute_moments=true
